from stlib.scene import MainHeader, ContactHeader
from stlib.visuals import ShowGrid
from stlib.physics.rigid import Floor
from stlib.physics.rigid import Cube
from stlib.physics.constraints import FixedBox
from softrobots.actuators import PullingCable
from sdsofa.utils.utils import parse_json
from splib.animation import animate
from stlib.scene import MainHeader, ContactHeader, Scene

def createScene(rootNode):
    """This is my first scene"""
    # MainHeader(rootNode, gravity=[0.0,-981.0,0.0])
    # ContactHeader(rootNode, alarmDistance=15, contactDistance=10)

    # Floor(rootNode,
    #       translation=[0.0,-160.0,0.0],
    #       isAStaticObject=True)

    # Cube(rootNode,
    #       translation=[0.0,0.0,0.0],
    #       uniformScale=20.0)
    scene = Scene(rootNode, plugins=["SoftRobots",
                                     "SofaSparseSolver"])
    scene.VisualStyle.displayFlags = "showBehavior"

    rootNode.dt = 0.005
    # rootNode.createObject("VisualStyle", displayFlags="showForceFields showBehaviorModels")
    # rootNode.createObject("FreeMotionAnimationLoop")
    # rootNode.createObject("GenericConstraintSolver", maxIterations=250, tolerance=1e-20)
    # rootNode.createObject("CollisionPipeline")
    # rootNode.createObject("BruteForceDetection")
    # rootNode.createObject("CollisionResponse")
    # rootNode.createObject("MinProximityIntersection", name="Proximity", alarmDistance="0.8", contactDistance="0.5")
    # rootNode.createObject("CollisionGroup")

    neo = rootNode.createChild("NeoHookean")
    # neo.createObject('EulerImplicitSolver', name='ODEsolver', rayleighStiffness='0.1', rayleighMass='0.1')
    neo.createObject('StaticSolver', newton_iterations='10', correction_tolerance_threshold='1e-4', residual_tolerance_threshold='1e-2', should_diverge_when_residual_is_growing='0')
    neo.createObject("CGLinearSolver", iterations=25, name="linear_solver", tolerance="1.0e-9", threshold="1.0e-9")
    neo.createObject("MechanicalObject", name="dofs")

    tetras = neo.createChild("tetras")
    loader = tetras.createObject("MeshVTKLoader", filename="/home/subella/catkin_ws2/src/SoftDrone-ROS/softdrone_sofa/mesh/simple_finger_2.vtk", scale="1")
    tetras.createObject("Mesh", src=loader)
    tetras.createObject("MechanicalObject", src=loader, name="dofs")
    tetras.createObject("UniformMass", totalMass=0)
    tetras.createObject("TetrahedronSetTopologyContainer", name="Container", src=loader)
    tetras.createObject("TetrahedronHyperelasticityFEMForceField", name="FEM", ParameterSet="1e4 11034.483", materialName="NeoHookean")
    # tetras.createObject("TetrahedronFEMForceField", template='Vec3d',
    #                                              method='large', name='forcefield',
    #                                              poissonRatio=0.4,  youngModulus=1e4)
    box = tetras.createObject("BoxROI", drawBoxes=1, box="-25 -25 -5 25 25 25", name="box")
    # box.init()
    # # print box.indices
    tetras.createObject("FixedConstraint", indices="@box.indices")
    tetras.createObject("UncoupledConstraintCorrection")
    # tetras.createObject('LinearSolverConstraintCorrection', solverName=solver.name)
    # solver = tetras.createObject('CGLinearSolver', iterations=25, name="linear_solver", tolerance="1.0e-9", threshold="1.0e-9")
    # <BoxROI drawBoxes="1" box="-25 -25 -5 25 25 25" name="box"/>
    #         <UncoupledConstraintCorrection />
    #     <FixedConstraint indices="@box.indices"/>


    # box = FixedBox(tetras, atPositions=[-25,-25,-5,25,25,25],
    #               doVisualization=True)
    # box.BoxROI.init()

    all_eyelet_locations = parse_json("/home/subella/catkin_ws2/src/SoftDrone-ROS/softdrone_sofa/mesh/finger_30x35_eyelets.json")["tendons"]
    for eyelets_wrt_finger_translations in all_eyelet_locations:
        # for eyelet_wrt_finger_translation in eyelets_wrt_finger_translations:
        #     box = addOrientedBoxRoi(self.node, position=deformableObject.dofs.getData("rest_position"), name="BoxROI",
        #                         translation=eyelet_wrt_finger_translation, scale=[8, 8, 40])
        #     box.init()
        #     deformableObject.init()
        #     groupIndices.append([ind[0] for ind in box.indices])

        cable = PullingCable(tetras,
                             valueType="force",
                             # pullPointLocation=eyelets_wrt_finger_translations[0][0],
                             cableGeometry=eyelets_wrt_finger_translations)
        cable = cable.getObject("CableConstraint")
        cable.value = 1000

    # dofs = [[153.47921797157855, -55.476282021179046, 5.050675170534513], [165.7535184312859, -67.076197142181, 1.1474066871743047], [155.31083382878265, -63.79381952046785, 21.977825192805895], [195.55282490511217, -63.48852032294539, 13.659650151269355], [198.69518867052287, -49.96375928009471, 23.85568550945308], [187.41957875831272, -59.52366615758898, 34.74371297384044], [169.56870451625971, -73.78292063040908, 17.5247334942489], [169.54115266293377, -65.57162671162968, 34.088956611407276], [182.27723473693615, -69.93726581938903, 4.675047486339213], [182.63785401084172, -71.96010918898064, 22.668772535845925],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[169.22407733856411, -42.711100485618644, 19.611606283224024]]
    # def myanimate(targets, factor):
    #     # print tetras.dofs.position
    #     tetras.dofs.position = dofs

    # animate(myanimate, {"targets": [neo]}, duration=5)

    return rootNode
